// COMSOL Multiphysics 4.3.2.152 model "model3_pcbv2.mph"
// Outline of the model tree

Geometry
  geom1 "Geometry 1" (3D, length unit m)
    imp1: Import | filename = C:\dokumentumok\_\kmr_shock_simulation\board_model\kmr_rcb_v2_pcb_and_acc.step
    fin: Finalize "Form Union"

Materials
  mat1 "FR4 (Circuit Board)" on domains 1
    def "Basic"
      relpermeability = 1
      electricconductivity = 0.004[S/m]
      relpermittivity = 4.5
      thermalexpansioncoefficient = 18e-6[1/K]
      heatcapacity = 1369[J/(kg*K)]
      density = 1900[kg/m^3]
      thermalconductivity = 0.3[W/(m*K)]
    Enu "Young's modulus and Poisson's ratio"
      youngsmodulus = 22e9[Pa]
      poissonsratio = 0.28
  mat2 "Aluminum" on domains 2-8
    def "Basic"
      relpermeability = 1
      heatcapacity = 900[J/(kg*K)]
      thermalconductivity = 160[W/(m*K)]
      electricconductivity = 3.774e7[S/m]
      relpermittivity = 1
      thermalexpansioncoefficient = 23e-6[1/K]
      density = 3750[kg/m^3]
    Enu "Young's modulus and Poisson's ratio"
      youngsmodulus = 70e9[Pa]
      poissonsratio = 0.33
    Murnaghan
      l = -2.5e11[Pa]
      m = -3.3e11[Pa]
      n = -3.5e11[Pa]
    Lame "Lamé parameters"
      lambLame = 5.1e10[Pa]
      muLame = 2.6e10[Pa]

Physics
  solid: SolidMechanics on all domains
    dependent variable u = {u, v, w}
    lemm1: LinearElasticModel "Linear Elastic Material 1" (default)
    free1: Free (default)
    init1: init "Initial Values 1" (default)
    fix1: Fixed "Fixed Constraint 1" on boundaries 16-19, 127, 128, 137-140
    bl1: BodyLoad on all domains | LoadType = ForceVolume; FperVol = {0, 0, -g_const*solid.rho}

Mesh
  mesh1 "Mesh 1"
    size: MeshSizeDefault | hauto = 4
    swe1: Sweep "Swept 1" on domains 1
      facemethod = tri
      mapinterpmethod = auto
      sourceface = boundaries 4, 22, 26, 37, 48, 90, 95, 100
      targetface = boundaries 3
      dis1: Distribution on domains 1 | numelem = 2
    ftet1: FreeTet "Free Tetrahedral 1" on domains 2-8

Studies
  std1 "Study 1"
    eig: Eigenfrequency | neigs = 15; shift = 700
  std2 "Study 2"
    timod: Transientmodal "Time-Dependent Modal" | tlist = range(0,1e-4,15e-3)

Solver configurations
  sol1 "Solver 1" (study std1)
    v1: Variables "Dependent Variables 1"
    e1: Eigenvalue "Eigenvalue Solver 1" | neigs = 15; transform = eigenfrequency; shift = 700
      dDef: Direct
  sol2 "Solver 2" (study std2)
    v1: Variables "Dependent Variables 1"
      mod1_u: Field "Displacement field (Material) (mod1.u)" | scalemethod = manual; scaleval = 1e-2*0.113306471386
    mo1: Modal "Modal Solver 1"
      analysistype = transient
      rtol = 1e-6
      tlist = range(0,1e-4,15e-3)
      atolglobal = 1e-5
      dampratio = 0.05
      loadfact = 50*sin(2*pi/10[ms]*t)*(t<5[ms])
      dDef: Direct

Datasets
  dset1: Solution | solution = sol1
  dset2: Solution | solution = sol2

Plots
  pg1: PlotGroup3D "Eigenmodes" | data = dset1
    surf1: Surface | expr = solid.disp
      def: Deform "Deformation" | expr = {u, v, w}
  pg2: PlotGroup3D "Shock Response" | data = dset2
    surf1: Surface | expr = w; unit = mm
      def1: Deform "Deformation 1" | expr = {u, v, w}
  pg3: PlotGroup1D "Accelerometer Displacement" | data = dset2
    ptgr1: PointGraph on points 141 | expr = w

Exports
  anim1: Animation "Animation Eigen"
    giffilename = anim_eigen_v2.gif
    sweeptype = solutions
    framesel = all
    maxframes = 15
    size = current
    width = 640
    height = 480
    options = on
    axes = on
  anim2: Animation "Animation Shock"
    giffilename = anim_shock_v2.gif
    sweeptype = solutions
    framesel = all
    maxframes = 81
    size = current
    width = 640
    height = 480
    options = on
    axes = on
  plot1: Plot "Acc Disp Data" | filename = accdisp_v2.txt