// COMSOL Multiphysics 4.3.2.152 model "pcb_tekercs.mph"
// Outline of the model tree

Parameters
  Ig = 1[A]  // gerjesztoaram
  mu_mag = 5000  // mag relativ permeabilitasa

Geometry
  geom1 "Geometry 1" (3D, length unit mm)
    wp1: WorkPlane
      c1: Circle | r = 30
      c2: Circle | r = 25
      c3: Circle | r = 12
      b1: BezierPolygon "Bézier Polygon 1" | p = {{11.5, 25.377210617065}, {0, 2.4994370937347}}; degree = 1; w = {1, 1}
      mir1: Mirror | input = b1; keep = on; axis = {0, 1}
      b2: BezierPolygon "Bézier Polygon 2"
        p = {{0, 31.845973968506, 31.845973968506, 0}, {0, 3.1365346908569, -3.1365346908569, 0}}
        degree = {1, 1, 1}
        w = {1, 1, 1, 1, 1, 1}
      uni1: Union | input = c1, c2, c3
      int1: Intersection | input = b2, uni1
    wp2: WorkPlane
      c1: Circle | r = 30; angle = 360
      b1: BezierPolygon "Bézier Polygon 1"
        p = {{0, 31.845973968506, 31.845973968506, 0}, {0, 3.1365346908569, -3.1365346908569, 0}}
        degree = {1, 1, 1}
        w = {1, 1, 1, 1, 1, 1}
        type = solid
      int1: Intersection | input = b1, c1
    wp3: WorkPlane | quickz = 0.21
      c1: Circle | r = 30; angle = 360
      b1: BezierPolygon "Bézier Polygon 1"
        p = {{0, 31.845973968506, 31.845973968506, 0}, {0, 3.1365346908569, -3.1365346908569, 0}}
        degree = {1, 1, 1}
        w = {1, 1, 1, 1, 1, 1}
        type = solid
      int1: Intersection | input = b1, c1
    ext1: Extrude
      workplane = wp1
      input = wp1
      distance = {0.1, 0.11, 0.21}
      scale = {{1, 1}, {1, 1}, {1, 1}}
      displ = {{0, 0}, {0, 0}, {0, 0}}
      twist = {0, 0, 0}
    ext2: Extrude | workplane = wp2; input = wp2; distance = -8
    ext3: Extrude | workplane = wp3; input = wp3; distance = 8
    fin: Finalize "Form Union"
      prob1: GeomError "Error 1"
        warning1: GeomWarning "Warning 1"

Materials
  mat1 "Soft Iron (with losses)" on domains 10, 13, 16
    def "Basic"
      electricconductivity = 1.12e7[S/m]
      relpermittivity = 1
      relpermeability = mu_mag
    BHCurve
      normB = BH(normH[m/A])[T]
      normH = sqrt(H1^2+H2^2+H3^2)
      BH: Interpolation
        source = table
        table = {{0, 0}, {663.146, 1}, {1067.5, 1.1}, {1705.23, 1.2}, {2463.11, 1.3}, {3841.67, 1.4}, {5425.74, 1.5}, {7957.75, 1.6}, {12298.3, 1.7}, {20462.8, 1.8}, {32169.6, 1.9}, {61213.4, 2.0}, {111408, 2.1}, {175070, 2.2}, {261469, 2.3}, {318310, 2.4}}
        interp = linear
        extrap = linear
    HBCurve
      normH = HB(normB[1/T])[A/m]
      normB = sqrt(B1^2+B2^2+B3^2)
      HB: Interpolation
        source = table
        table = {{0, 0}, {1, 663.146}, {1.1, 1067.5}, {1.2, 1705.23}, {1.3, 2463.11}, {1.4, 3841.67}, {1.5, 5425.74}, {1.6, 7957.75}, {1.7, 12298.3}, {1.8, 20462.8}, {1.9, 32169.6}, {2.0, 61213.4}, {2.1, 111408}, {2.2, 175070}, {2.3, 261469}, {2.4, 318310}}
        interp = linear
        extrap = linear
  mat2 "FR4 (Circuit Board)" on domains 2-4, 6-9, 11, 12, 14, 15, 17-26
    def "Basic"
      relpermeability = 1
      electricconductivity = 0.004[S/m]
      relpermittivity = 4.5
      thermalexpansioncoefficient = 18e-6[1/K]
      heatcapacity = 1369[J/(kg*K)]
      density = 1900[kg/m^3]
      thermalconductivity = 0.3[W/(m*K)]
    Enu "Young's modulus and Poisson's ratio"
      youngsmodulus = 22e9[Pa]
      poissonsratio = 0.28
  mat3 "Air" on domains 1, 5
    def "Basic"
      relpermeability = 1
      relpermittivity = 1
      dynamicviscosity = eta(T[1/K])[Pa*s]
      ratioofspecificheat = 1.4
      electricconductivity = 0.01[S/m]
      heatcapacity = Cp(T[1/K])[J/(kg*K)]
      density = rho(pA[1/Pa],T[1/K])[kg/m^3]
      thermalconductivity = k(T[1/K])[W/(m*K)]
      soundspeed = cs(T[1/K])[m/s]
      eta: Piecewise | arg = T; extrap = constant; pieces = {200.0, 1600.0, -8.38278E-7+8.35717342E-8*T^1-7.69429583E-11*T^2+4.6437266E-14*T^3-1.06585607E-17*T^4}
      Cp: Piecewise | arg = T; extrap = constant; pieces = {200.0, 1600.0, 1047.63657-0.372589265*T^1+9.45304214E-4*T^2-6.02409443E-7*T^3+1.2858961E-10*T^4}
      rho: Analytic | expr = pA*0.02897/8.314/T; args = {pA, T}; dermethod = manual; argders = {{pA, d(pA*0.02897/8.314/T,pA)}, {T, d(pA*0.02897/8.314/T,T)}}
      k: Piecewise | arg = T; extrap = constant; pieces = {200.0, 1600.0, -0.00227583562+1.15480022E-4*T^1-7.90252856E-8*T^2+4.11702505E-11*T^3-7.43864331E-15*T^4}
      cs: Analytic | expr = sqrt(1.4*287*T); args = T; dermethod = manual; argders = {T, d(sqrt(1.4*287*T),T)}
    RefractiveIndex
      n = 1
      ki = 0

Physics
  mf: InductionCurrents "Magnetic Fields" on all domains
    dependent variable A = {Ax, Ay, Az}
    al1: AmperesLaw "Ampère's Law 1" (default)
    mi1: MagneticInsulation (default)
    init1: init "Initial Values 1" (default)
    edc1: EdgeCurrent on edges 18, 21, 24, 28, 72, 119 | Ie = Ig
    edc2: EdgeCurrent on edges 19, 53, 100, 134, 137, 140 | Ie = -Ig
    pc1: PeriodicCondition on boundaries 1, 2, 4, 5, 7, 8, 10, 11, 13, 14, 28, 31, 34, 38, 41, 44, 64, 67, 70, 74, 77, 80, 100, 102, 104, 106, 108, 110

Mesh
  mesh1 "Mesh 1"
    size: MeshSizeDefault | hmax = 1.8; hmin = 0.1; hauto = 5; custom = on
    ftri1: FreeTri "Free Triangular 1" on boundaries 15, 26, 36, 46, 56, 72, 82, 92
    swe1: Sweep "Swept 1" on domains 4, 8, 11, 14, 17, 20, 23, 26
      dis1: Distribution on domains 4, 8, 11, 14, 17, 20, 23, 26 | numelem = 2
    swe2: Sweep "Swept 2" on domains 3, 7, 10, 13, 16, 19, 22, 25
      dis1: Distribution on domains 3, 7, 10, 13, 16, 19, 22, 25 | numelem = 1
    swe3: Sweep "Swept 3" on domains 2, 6, 9, 12, 15, 18, 21, 24
      dis1: Distribution on domains 2, 6, 9, 12, 15, 18, 21, 24 | numelem = 2
    ftri2: FreeTri "Free Triangular 2" on boundaries 1, 13
    cpf1: CopyFace | source = boundaries 1, 13; destination = boundaries 2, 14
    ftet1: FreeTet "Free Tetrahedral 1" on domains 1, 5

Studies
  std1 "Study 1"
    stat: Stationary

Solver configurations
  sol1 "Solver 1" (study std1)
    v1: Variables "Dependent Variables 1"
    s1: Stationary "Stationary Solver 1"
      fc1: FullyCoupled | linsolver = i1
      i1: Iterative | linsolver = fgmres; rhob = 5
        mg1: Multigrid

Datasets
  dset1: Solution | solution = sol1

Derived values
  int1: IntVolume "Volume Integration 1" on all domains
    data = dset1
    table = tbl1
    expr = 32*2*mf.Wm/(Ig^2)
    descr = induktivitas
  int2: IntVolume "Volume Integration 2" on domains 10, 13, 16
    data = dset1
    table = tbl1
    expr = 32*2*mf.Wm/(Ig^2)
    descr = induktivitas (csak vasra)

Tables
  tbl1: Table
    // Volume Integration 1 (32*2*mf.Wm/(Ig^2))
    induktivitas (H) | induktivitas (csak vasra) (H)
    6.51689e-06 | 4.12631e-06

Plots
  pg1: PlotGroup3D "Magnetic Flux Density Norm (mf)" | data = dset1
    slc1: Slice
      expr = mf.normB
      quickplane = xy
      quickzmethod = coord
      quickz = 0.105
      quickznumber = 1
      quickxnumber = 1
      genpoints = {{0, 0, 0}, {1, 0, 0}, {0, 1, 0}}
      shift = 0